# МИНИСТЕРСТВО НАУКИ И ВЫСШЕГО ОБРАЗОВАНИЯ
# РОССИЙСКОЙ ФЕДЕРАЦИИ
# ФЕДЕРАЛЬНОЕ ГОСУДАРСТВЕННОЕ БЮДЖЕТНОЕ
# ОБРАЗОВАТЕЛЬНОЕ УЧРЕЖДЕНИЕ ВЫСШЕГО ОБРАЗОВАНИЯ
# НОВОСИБИРСКИЙ ГОСУДАРСТВЕННЫЙ ТЕХНИЧЕСКИЙ УНИВЕРСИТЕТ
#
# КАФЕДРА ВЫЧИСЛИТЕЛЬНОЙ ТЕХНИКИ
#
# Лабораторная работа №4
# по дисциплине «Вычислительная математика»
# на тему «Численные методы интерполяции функций»
#
# Факультет: АВТФ
# Группа: АВТ-019
# Студенты: Балаганский Т. Е.
# Преподаватель: Балакин В. В.
#
# Новосибирск 2021
# Содержание отчёта
# Цели работы.
# Исходные данные и задание сетки значений.
# Исследование поведение ошибки аппроксимации табличной функции многочленом Тейлора.
# Исследование распределения ошибки глобальной интерполяции метода Лагранжа, зависимости максимальной ошибки приближения на выбранном отрезке от степени многочлена и проверка работоспособности метода для случайных значений в сетке.
# Полученные эксперементальные данные.
# Анализ полученных результатов.
# Цели работы
# 1. Исследовать поведение ошибки аппроксимации табличной функции многочленом Тейлора на отрезке непрерывности [a, b] в зависимости от степени аппроксимирующего многочлена и от положения точки разложения на выбранном интервале.
# 2. С помощью интерполяционного многочлена Лагранжа изучить распределение ошибки глобальной интерполяции в пределах таблицы заданной функции.
# 3. Выяснить влияние степени многочлена на ошибку интерполирования и изучить эту зависимость, используя "скользящий " интерполяционный многочлен.
# 4. Проверить работоспособность метода интерполяции Лагранжа для случайных значений сетки.
# 5. Проанализировать результаты работы, сделать выводы и дадать рекомендации к применению данных методов для решения данных задач на ЭВМ.
# 1
# Исходные данные и задание сетки значений.
# Вариант 1
f(x) := x^4 - 18*x^2 + 6
# 1 Анализ  ошибки аппроксимации табличной функции многочленом Тейлора
# Исследуем ошибку аппроксимации табличной функции многочленом Тейлора на отрезке непрерывности [a, b] в зависимости от степени аппроксимирующего многочлена и от положения точки разложения на выбранном интервале. Выбран был интервал [-5, 5]. На рисунках ниже слева изображены графики функции и её аппроксимации, а справа – зависимость величины относительной ошибки аппроксимации от x.
# 1.1 Задание аппроксимируемой функции и интервала аппроксимации
a := 5
b := 10
n := 10
h := (b - a)/(n - 1)
x := a, a + h .. b
c := (a + b)/2
c1 := a
c2 := (a + b)/2
c3 := b
cs := [c1; c2; c3]
# 1.2 Определяем прозводные аппроксимируемой функции на основе символных операций MathCAD
f1(x) := d/dx(f(x)) → 4*x^3 - 36*x
f2(x) := d/dx(f1(x)) → 12*x^2 - 36
f3(x) := d/dx(f2(x)) → 24*x
f4(x) := d/dx(f3(x)) → 24
# 1.3  Задание полиномов Тейлора до 4-го порядка включительно
Q1(x) := f(c) + f1(c)*(x - c)
Q2(x) := Q1(x) + f2(c)*(x - c)^2/2!
Q3(x) := Q2(x) + f3(c)*(x - c)^3/3!
Q4(x) := Q3(x) + f4(c)*(x - c)^4/4!
# 1.4  Визуализация результатов вычислительного эксперимента
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integral(|f(x) - Q1(x)|, x = a .. b) = 3367.19
|f(c1) - Q1(c1)| = 1567.19
|f(c2) - Q1(c2)| = 0
|f(c3) - Q1(c3)| = 2504.69
|f(cs) - Q1(cs)| = 2954.58
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integral(|f(x) - Q2(x)|, x = a .. b) = 585.938
|f(c1) - Q2(c1)| = 429.688
|f(c2) - Q2(c2)| = 0
|f(c3) - Q2(c3)| = 507.812
|f(cs) - Q2(cs)| = 665.21
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integral(|f(x) - Q3(x)|, x = a .. b) = 39.0625
|f(c1) - Q3(c1)| = 39.0625
|f(c2) - Q3(c2)| = 0
|f(c3) - Q3(c3)| = 39.0625
|f(cs) - Q3(cs)| = 55.2427
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integral(|f(x) - Q4(x)|, x = a .. b) = 1.46086e-12
|f(c1) - Q4(c1)| = 0
|f(c2) - Q4(c2)| = 0
|f(c3) - Q4(c3)| = 0
|f(cs) - Q4(cs)| = 0
# С увеличением порядка многочлена уменьшается ошибка аппроксимации (Однако, при слишком большом порядке многочлена ошибка округления может превысить ошибку метода, после чего ошибка будет неконтролируемо увеличиваться). По графикам можно заметить характерную особенность данного метода: чем дальше от точки разложения, тем больше ошибка аппроксимации.
# 2 Анализ погрешности интерполяции на основе многочлена Лагранжа
# Изучим распределение ошибки глобальной интерполяции в пределах таблицы заданной
# функции с помощью интерполяционных многочленов Лагранжа. Для измерения ошибки используется максимальное значение абсолютной ошибки интерполяции.
# 2.1  Задание таблицы функции  (n -  число интервалов таблицы)
n ≡ 5
i := 0 .. n
H := (b - a)/n
x[i] := a + H*i
y[i] := f(x[i])
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Spl(t, x, y, k) :=
    N ← last(x)
    i ← 0
    while x[i] < t and i < N
        i ← i + 1
    start ← i + trunc(k/2) - k if i + trunc(k/2) < N
    start ← N - k otherwise
    start ← 0 if start < 0
    for i ∈ 0 .. k
        Y[i] ← y[start + i]
        X[i] ← x[start + i]
    sum(Y[i]*product(if(i == j, 1, (t - X[j])/(X[i] - X[j])), j = 0 .. k), i = 0 .. k)
hh := (b - a)/500
t := a, a + hh .. b
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# Анализ полученных результатов
# Проанализируем полученные данные.
# Как и ожидалось теоретически, многочлен Тейлора сходится в основном в окрестности точки разложение, сходимость является более быстрой для точек, близких к точке разложения, чем для отдалённых от неё. Так для середины выбранного нами отрезка, скорость сходимости наиболее высока, чем для точек концов отрезка. Тот факт, что эта окрестность увеличивается при увеличении степени многочлена также подтверждается проделанными опытами.
# Для интерполяционных многочленов Лагранжа также, как и для многочлена Тейлора, характерно уменьшение ошибки приближения при увеличении степени многочлена,  Для данных полиномов ошибка приближения, как правило, меньше всего в точках отрезка разложения, и скорость её убывания для этих точек является наибольшей, нежели для точек, не принадлежащих этому отрезку. Метод интерполяции Лагранжа вполне применим для случайных сеток, основным условием только остаётся то, что данные в этой сетке должны быть упорядочены, и в них не должно быть повторений одних и тех же значений, т.н. метод интерполяции Лагранжа хорошо применим для практических задач, где далеко не всегда возможно получить равномерную сетку значений. Многочлен Лагранжа можно с определённой степенью и заданной необходимой точностью применять и в случах экстраполяции, однако стоит помнить, что за пределами данного отрезка, интерполяция Лагранжа даёт существенные погрешности приближения относительно погрешностей в точках отрезка, в нашем случае для точки x = -1.5 и отрезка [-1 : 2], ошибка приближения в первом случае была в 5*10^4 раз больше максимальной ошибки приближения на этом отрезке, хотя и составляло значение  3.688 * 10^-5.
# Список используемой литературы
# А.А. Амосов, Ю.А. Дубинский, Н.В. Копченова: Вычислительные методы: Учебное пособие. - 4-е издание, стереотипное. - СПб.: Издательство "Лань", 2014. - 672
# Латыпов И.И. Численные методы. Лабораторный практикум: Учебное пособие для студентов физико-математического факультета по основам численных методов. Книга 1. Бирск: Бирск.гос.соц.-пед.акад., 2007.  94 с.
# Исаков В.Б. Элементы численных методов: Учебное пособие. - М.: Академия, 2003.-192 с. :ил.
# Поршнев С. В., Беленкова И. В. Численные  методы  на  базе  Mathcad. СПб.;  БХВ-Петербург, 2005.  464 с: ил.
